<?xml version="1.0"?>

<turboprop_engine name="Lycoming_T53-L-11_turboshaft">
  <milthrust unit="LBS"></milthrust>
  <idlen1>25</idlen1>
  <maxn1>110.0</maxn1>
  <maxpower unit="HP">1400</maxpower>
  <psfc unit="LBS/HR/HP">0.44</psfc>
  <n1idle_max_delay>2</n1idle_max_delay>
  <maxstartingtime>3</maxstartingtime>
  <startern1>60</startern1>
  <ielumaxtorque unit="FT*LB">0</ielumaxtorque>
  <itt_delay>0.15</itt_delay>
  <betarangeend>64</betarangeend>
  <reversemaxpower>0</reversemaxpower>

	<function name="EnginePowerVC">
		<table>
			<description> Engine power, function of ram air </description>
			<independentVar lookup="row">aero/qbar-psf</independentVar>
				<tableData>
					0		1.000
					2.8		1.012
					5.6		1.013
					8.3		1.013
					11.1	1.014
					13.9	1.015
					16.7	1.016
					19.4	1.018
					22.2	1.020
					25.0	1.022
					27.8	1.025
					30.6	1.029
					33.3	1.034
					36.1	1.040
					38.9	1.047
					41.7	1.056
					44.4	1.068
					47.2	1.082
					50.0	1.100
					52.8	1.122
					55.6	1.150
					58.3	1.186
					61.1	1.229
					63.9	1.284
					66.7	1.353
					69.4	1.438
				</tableData>
		</table>
	</function>

<!-- Fitted to UH1-D -->
<!--
<table name="EnginePowerRPM_N1" type="internal">
		<description> Engine Power, function of Engine RPM(N2) and (N1) </description>
			<tableData>
						5	10	20	40	80	85	90	95	98
				0		1	1	1	1	1	1	1	1	1
				660		6	13	26	51	102	165	237	303	342
				1320	11	21	43	85	170	275	395	505	570
				1980	14	28	56	113	225	335	480	600	675
				2640	17	34	69	138	275	390	550	700	790
				3300	19	39	78	155	310	415	610	800	900
				3960	21	43	85	170	340	440	630	860	980
				4620	23	46	91	183	365	465	650	900	1035
				5280	24	48	95	190	380	500	680	905	1065
				5940	24	48	96	193	385	515	705	910	1075
				6600	22	44	88	175	350	510	700	920	1080
			</tableData>
	</table> -->

<!-- Fitted to UH1-H -->
	<table name="EnginePowerRPM_N1" type="internal">
		<description> Engine Power, function of Engine RPM(N2) and Throttle setting(N1) </description>
			<tableData>
						5	10	20	40	80	85	90	95	100		105		110
				0		1	2	4	8	16	26	37	48	54		61		68
				2109	6	13	26	52	104	168	241	309	348		396		443
				4217	11	22	43	87	173	280	402	514	581		660		739
				6326	14	29	57	115	229	341	489	611	688		781		875
				8434	18	35	70	140	280	397	560	713	805		914		1024
				10543	20	39	79	158	316	423	621	815	917		1042	1167
				12651	22	43	87	173	346	448	642	876	998		1134	1270
				14760	23	46	93	186	372	474	662	917	1054	1198	1342
				16868	24	48	97	194	387	509	693	922	1085	1233	1381
				18977	25	49	98	196	392	525	718	927	1095	1244	1394
				21085	22	45	89	178	356	519	713	937	1100	1250	1400
				23194	18	40	80	158	316	511	705	949	1105	1254	1404
			</tableData>
	</table>

	<table name="ITT_N1" type="internal">
		<description> Inter-Turbine Temperature ITT [deg C] depending on N1 and engine run (0=off / 1=running) </description>
			<tableData>
						0		1
				0		0		0
				25		75		200
				50		150		400
				100		300		800
				110		330		880
			</tableData>
	</table>

	<table name="CombustionEfficiency_N1" type="internal">
		<description> Burn Efficiency, function of Throttle setting(N1) </description>
			<tableData>
				0		0.2
				65		0.85
				75		0.90
				85		0.94
				90		0.97
				95		0.99
				100		1.0
			</tableData>
	</table>

</turboprop_engine>
