<?xml version="1.0"?>

<!--

Copyright (c) 2021 Simon 'bomber' Morley
simonbomber64 at googlemail.com

This work is licensed under the
Creative Commons Attribution-NonCommercial-ShareAlike 3.0 Unported License.
To view a copy of this license,
visit http://creativecommons.org/licenses/by-nc-sa/_3.0/ or
send a letter to Creative Commons, PO Box 1866, Mountain View, Cd 94042, USA.

Attribution,  You must give appropriate credit, provide a link to the license,
and indicate if changes were made. You may do so in any reasonable manner,
but not in any way that suggests the licensor endorses you or your use.

NonCommercial,  You may not use the material for commercial purposes.

ShareAlike,  If you remix, transform, or build upon the material,
you must distribute your contributions under the same license as the original.

**************************************************************************
-->

<propeller name="2 blade rotor for Bell UH-1" version="1.01">

	<!--
	<ixx> is the rotational moment of inertia for the propeller/engine combination.
	Small numbers accelerate faster but bounce around more. Large numbers
	accelerate slower and regulate smoother.

	I = m*D^2/12

	m=	167.04	kg
	d=	14.63	m
	-->

	<ixx unit="SLUG*FT2">2196.02880839811</ixx>

	<!--
	Prop Characteristics
	-->

	<diameter unit="IN">575.984251968504</diameter>
	<numblades>2</numblades>
	<constspeed>0</constspeed>
	<gearratio>1</gearratio>

	<minpitch>-9.1</minpitch>					<!-- is the Prop min AoA setting -->
	<maxpitch>6.2</maxpitch>					<!-- is the Prop max AoA setting -->

	<minrpm>323</minrpm>
	<maxrpm>325</maxrpm>					<!-- is the Prop Govenors max setting -->

	<ct_factor> 0.00000001 </ct_factor>					<!-- is the props co-efficent of thrust 'tuning' factor -->
	<cp_factor> 1 </cp_factor>					<!-- is the props co-efficent of power 'tuning' factor -->

	<table name="C_THRUST" type="internal">
	<tableData>
			-9.1	0	2.1	6.2
		-0.40	0.038558	0.057227	0.064126	0.084993
		-0.35	0.025939	0.051818	0.058619	0.079008
		-0.30	0.015866	0.046409	0.053112	0.073189
		-0.25	0.012478	0.041000	0.047605	0.067642
		-0.20	0.011014	0.035591	0.042098	0.062438
		-0.15	0.010307	0.031070	0.037184	0.056732
		-0.10	0.010339	0.026549	0.032891	0.051709
		-0.05	0.005296	0.020000	0.027000	0.046354
		0.00	0.000253	0.014000	0.021000	0.039475
		0.05	-0.004790	0.008000	0.015000	0.032596
		0.10	-0.009833	0.001451	0.009109	0.027241
		0.15	-0.009801	-0.003070	0.004816	0.022218
		0.20	-0.010508	-0.007591	-0.000098	0.016512
		0.25	-0.011972	-0.013000	-0.005605	0.011308
		0.30	-0.015360	-0.018409	-0.011112	0.005761
		0.35	-0.025433	-0.023818	-0.016619	-0.000058
		0.40	-0.038052	-0.029227	-0.022126	-0.006043
	</tableData>
	</table>

	<table name="C_POWER" type="internal">
	<tableData>
			-9.1	0	2.1	6.2
		-0.40	0.006029	-0.004281	-0.003160	0.000107
		-0.35	0.002805	-0.003054	-0.001872	0.002357
		-0.30	0.000996	-0.001827	-0.000584	0.004211
		-0.25	0.000745	-0.000600	0.000704	0.005660
		-0.20	0.000663	0.000627	0.001992	0.006727
		-0.15	0.000690	0.001355	0.002868	0.007764
		-0.10	0.000728	0.002083	0.003115	0.008263
		-0.05	0.000367	0.002207	0.003500	0.008234
		0.00	0.000367	0.002330	0.003504	0.008156
		0.05	0.000367	0.002207	0.003500	0.008234
		0.10	0.000728	0.002083	0.003115	0.008263
		0.15	0.000690	0.001355	0.002868	0.007764
		0.20	0.000663	0.000627	0.001992	0.006727
		0.25	0.000745	-0.000600	0.000704	0.005660
		0.30	0.000996	-0.001827	-0.000584	0.004211
		0.35	0.002805	-0.003054	-0.001872	0.002357
		0.40	0.006029	-0.004281	-0.003160	0.000107
	</tableData>
	</table>

	<!-- thrust effects of helical tip Mach -->
	<table name="CT_MACH" type="internal">
		<tableData>
			0.85   1.0
			1.05   0.8
		</tableData>
	</table>

	<!-- power-required effects of helical tip Mach -->
	<table name="CP_MACH" type="internal">
		<tableData>
			0.85   1.0
			1.05   1.8
		</tableData>
	</table>

</propeller>
